<?xml version="1.0" encoding="UTF-8" standalone="yes"?>
<neuroml lengthUnits="micron" xmlns="http://morphml.org/neuroml/schema">
    <cells>
        <cell name="5199202a">
            <ns1:notes xmlns:ns1="http://morphml.org/metadata/schema">Cell morphology generated by
                neuroConstruct from file: 5199202.CNG.swc Original file 5199202.out.swc edited by
                Duncan Donohue using StdSwc version 1.21 on 5/16/05. Irregularities and fixes
                documented in 5199202.out.swc.std. See StdSwc1.21.doc for more information. Amaral
                conversion fix by Duncan Donohue Types 3 and 4 switched Claiborne to SWC conversion
                from L-Measure. R. Scorcioni: rscorcio@gmu.edu Original
                fileName:D:\ded\p5\Archive\DG\Claiborne\5199202.out </ns1:notes>
            <ns2:segments xmlns:ns2="http://morphml.org/morphml/schema">
                <ns2:segment cable="0" id="0" name="Comp_1">
                    <ns2:proximal diameter="4.2261" x="0.0" y="0.0" z="0.0"/>
                    <ns2:distal diameter="4.2261" x="0.0" y="0.0" z="0.0"/>
                </ns2:segment>
                <ns2:segment cable="1" id="1" name="Comp_2" parent="0">
                    <ns2:proximal diameter="2.95" x="0.0" y="0.0" z="0.0"/>
                    <ns2:distal diameter="2.95" x="-0.13" y="9.14" z="-2.64"/>
                </ns2:segment>
                <ns2:segment cable="1" id="2" name="Comp_3" parent="1">
                    <ns2:distal diameter="2.95" x="0.2" y="11.85" z="-3.29"/>
                </ns2:segment>
                <ns2:segment cable="2" id="3" name="Comp_4" parent="2">
                    <ns2:proximal diameter="1.97" x="0.2" y="11.85" z="-3.29"/>
                    <ns2:distal diameter="1.97" x="2.83" y="14.8" z="-1.45"/>
                </ns2:segment>
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            </ns2:segments>
            <ns3:cables xmlns:ns3="http://morphml.org/morphml/schema">
                <ns3:cable fractAlongParent="0.0" fract_along_parent="0.0" id="0" name="Soma">
                    <ns4:group xmlns:ns4="http://morphml.org/metadata/schema">all</ns4:group>
                    <ns5:group xmlns:ns5="http://morphml.org/metadata/schema">soma_group</ns5:group>
                    <ns6:group xmlns:ns6="http://morphml.org/metadata/schema">Colour_White</ns6:group>
                </ns3:cable>
                <ns3:cable fractAlongParent="0.5" fract_along_parent="0.0" id="1" name="Sec_Comp_2">
                    <ns7:group xmlns:ns7="http://morphml.org/metadata/schema">all</ns7:group>
                    <ns8:group xmlns:ns8="http://morphml.org/metadata/schema">dendrite_group</ns8:group>
                    <ns9:group xmlns:ns9="http://morphml.org/metadata/schema">Colour_Green</ns9:group>
                </ns3:cable>
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            </ns3:cables>
        </cell>
        <cell name="cell1zr">
            <ns118:notes xmlns:ns118="http://morphml.org/metadata/schema">Cell morphology generated
                by neuroConstruct from file: cell1zr.CNG.swc Original file cell1zr.txt.swc edited by
                Duncan Donohue using StdSwc version 1.21 on 5/25/05. Irregularities and fixes
                documented in cell1zr.txt.swc.std. See StdSwc1.21.doc for more information. Amaral
                to SWC conversion from L-Measure. R. Scorcioni: rscorcio@gmu.edu Original
                fileName:H:\\cells\\ca3\\henze\\cell1zr.txt ORIGINAL_SOURCE CREATURE REGION
                FIELD/LAYER TYPE CONTRIBUTOR REFERENCE RAW EXTRAS SOMA_AREA SHRINKAGE_CORRECTION
                VERSION_NUMBER VERSION_DATE ********************************************* SCALE 1.0
                1.0 1.0 </ns118:notes>
            <ns119:segments xmlns:ns119="http://morphml.org/morphml/schema">
                <ns119:segment cable="0" id="0" name="Comp_1">
                    <ns119:proximal diameter="13.206" x="-1.135" y="21.0" z="1.692"/>
                    <ns119:distal diameter="13.206" x="-1.135" y="21.0" z="1.692"/>
                </ns119:segment>
                <ns119:segment cable="1" id="1" name="Comp_2" parent="0">
                    <ns119:proximal diameter="1.8" x="-1.135" y="21.0" z="1.692"/>
                    <ns119:distal diameter="1.8" x="0.0" y="0.0" z="0.0"/>
                </ns119:segment>
                <ns119:segment cable="1" id="2" name="Comp_3" parent="1">
                    <ns119:distal diameter="1.8" x="-1.5" y="0.0" z="-2.0"/>
                </ns119:segment>
                <ns119:segment cable="1" id="3" name="Comp_4" parent="2">
                    <ns119:distal diameter="1.8" x="-2.5" y="-6.5" z="-2.0"/>
                </ns119:segment>
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            </ns119:segments>
            <ns120:cables xmlns:ns120="http://morphml.org/morphml/schema">
                <ns120:cable fractAlongParent="0.0" fract_along_parent="0.0" id="0" name="Soma">
                    <ns121:group xmlns:ns121="http://morphml.org/metadata/schema">all</ns121:group>
                    <ns122:group xmlns:ns122="http://morphml.org/metadata/schema">soma_group</ns122:group>
                    <ns123:group xmlns:ns123="http://morphml.org/metadata/schema">Colour_White</ns123:group>
                </ns120:cable>
                <ns120:cable fractAlongParent="0.5" fract_along_parent="0.0" id="1" name="Sec_Comp_2">
                    <ns124:group xmlns:ns124="http://morphml.org/metadata/schema">all</ns124:group>
                    <ns125:group xmlns:ns125="http://morphml.org/metadata/schema">Colour_DarkGrey</ns125:group>
                    <ns126:group xmlns:ns126="http://morphml.org/metadata/schema">axon_group</ns126:group>
                </ns120:cable>
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            </ns120:cables>
        </cell>
    </cells>
    <ns643:populations xmlns:ns643="http://morphml.org/networkml/schema">
        <ns643:population cell_type="5199202a" name="5199202a">
            <ns643:instances size="11">
                <ns643:instance id="1712200495838795835">
                    <ns643:location x="279.45098876953125" y="-119.98249816894531" z="-197.0970001220703"/>
                    <ns643:curveAssociation curveId="3926" time="0.24370786547660828"/>
                    <ns643:rotation w="-0.2272021770477295" x="0.9738478660583496" y="0.0" z="0.0"/>
                    <ns643:scale x="0.009999878704547882" y="0.009999878704547882" z="0.009999878704547882"/>
                </ns643:instance>
                <ns643:instance id="2359711671466199406">
                    <ns643:location x="279.4509582519531" y="-120.0710678100586" z="-189.84690856933594"/>
                    <ns643:curveAssociation curveId="3926" time="0.1539999395608902"/>
                    <ns643:rotation w="-0.22720211744308472" x="0.9738480448722839" y="0.0" z="0.0"/>
                    <ns643:scale x="0.009999878704547882" y="0.009999878704547882" z="0.009999878704547882"/>
                </ns643:instance>
                <ns643:instance id="4782310076950211400">
                    <ns643:location x="279.450927734375" y="-121.48832702636719" z="-209.6265106201172"/>
                    <ns643:curveAssociation curveId="3926" time="0.38373008370399475"/>
                    <ns643:rotation w="0.1699671894311905" x="-0.9854499101638794" y="0.0" z="0.0"/>
                    <ns643:scale x="0.009999878704547882" y="0.009999878704547882" z="0.009999878704547882"/>
                </ns643:instance>
                <ns643:instance id="8081138894599700859">
                    <ns643:location x="279.45159912109375" y="-111.54647827148438" z="-185.0326690673828"/>
                    <ns643:curveAssociation curveId="3926" time="0.8773021101951599"/>
                    <ns643:rotation w="1.0" x="0.0" y="0.0" z="0.0"/>
                    <ns643:scale x="0.009999878704547882" y="0.009999878704547882" z="0.009999878704547882"/>
                </ns643:instance>
                <ns643:instance id="5726768438326090533">
                    <ns643:location x="279.45098876953125" y="-119.75092315673828" z="-194.10379028320312"/>
                    <ns643:curveAssociation curveId="3926" time="0.21142783761024475"/>
                    <ns643:rotation w="-0.07912106812000275" x="0.9968653321266174" y="0.0" z="0.0"/>
                    <ns643:scale x="0.009999878704547882" y="0.009999878704547882" z="0.009999878704547882"/>
                </ns643:instance>
                <ns643:instance id="3204692422665200927">
                    <ns643:location x="279.450927734375" y="-113.30316162109375" z="-175.93234252929688"/>
                    <ns643:curveAssociation curveId="3926" time="0.9990000128746033"/>
                    <ns643:rotation w="0.9689124822616577" x="0.24740397930145264" y="0.0" z="0.0"/>
                    <ns643:scale x="0.009999878704547882" y="0.009999878704547882" z="0.009999878704547882"/>
                </ns643:instance>
                <ns643:instance id="-3338336855918162561">
                    <ns643:location x="279.4518127441406" y="-110.9927978515625" z="-189.89315795898438"/>
                    <ns643:curveAssociation curveId="3926" time="0.8189998269081116"/>
                    <ns643:rotation w="1.0" x="0.0" y="0.0" z="0.0"/>
                    <ns643:scale x="0.009999878704547882" y="0.009999878704547882" z="0.009999878704547882"/>
                </ns643:instance>
                <ns643:instance id="521831834307754446">
                    <ns643:location x="279.4510498046875" y="-114.29252624511719" z="-198.61854553222656"/>
                    <ns643:curveAssociation curveId="3926" time="0.626818060874939"/>
                    <ns643:rotation w="0.9393727779388428" x="-0.34289783239364624" y="0.0" z="0.0"/>
                    <ns643:scale x="0.009999878704547882" y="0.009999878704547882" z="0.009999878704547882"/>
                </ns643:instance>
                <ns643:instance id="-8428333008825789875">
                    <ns643:location x="279.450927734375" y="-119.27924346923828" z="-207.8599395751953"/>
                    <ns643:curveAssociation curveId="3926" time="0.47982001304626465"/>
                    <ns643:rotation w="0.9393728375434875" x="-0.3428979516029358" y="0.0" z="0.0"/>
                    <ns643:scale x="0.009999878704547882" y="0.009999878704547882" z="0.009999878704547882"/>
                </ns643:instance>
                <ns643:instance id="-1444392483799333482">
                    <ns643:location x="279.4509582519531" y="-120.96278381347656" z="-185.55113220214844"/>
                    <ns643:curveAssociation curveId="3926" time="0.09199994802474976"/>
                    <ns643:rotation w="1.0" x="0.0" y="0.0" z="0.0"/>
                    <ns643:scale x="0.009999878704547882" y="0.009999878704547882" z="0.009999878704547882"/>
                </ns643:instance>
                <ns643:instance id="-6271578869469657494">
                    <ns643:location x="279.45098876953125" y="-122.11824798583984" z="-181.0599822998047"/>
                    <ns643:curveAssociation curveId="3926" time="0.0010000000474974513"/>
                    <ns643:rotation w="0.16996720433235168" x="-0.9854500889778137" y="0.0" z="0.0"/>
                    <ns643:scale x="0.009999878704547882" y="0.009999878704547882" z="0.009999878704547882"/>
                </ns643:instance>
            </ns643:instances>
        </ns643:population>
        <ns643:population cell_type="cell1zr" name="cell1zr">
            <ns643:instances size="1">
                <ns643:instance id="-1404378199565919973">
                    <ns643:location x="279.90155029296875" y="-88.6271743774414" z="-179.14976501464844"/>
                    <ns643:curveAssociation curveId="1177" time="0.3669997453689575"/>
                    <ns643:rotation w="1.0" x="0.0" y="0.0" z="0.0"/>
                    <ns643:scale x="0.009999997913837433" y="0.009999997913837433" z="0.009999997913837433"/>
                </ns643:instance>
            </ns643:instances>
        </ns643:population>
    </ns643:populations>
    <curves>
        <curve id="1177" name="user-created curve">
            <ns644:point x="277.0591125488281" y="-103.03050994873047" z="-218.71409606933594" xmlns:ns644="http://morphml.org/metadata/schema"/>
            <ns645:point x="279.9015197753906" y="-95.11184692382812" z="-208.77931213378906" xmlns:ns645="http://morphml.org/metadata/schema"/>
            <ns646:point x="279.9015197753906" y="-86.90301513671875" z="-188.1125030517578" xmlns:ns646="http://morphml.org/metadata/schema"/>
            <ns647:point x="279.9015197753906" y="-91.82810974121094" z="-173.04673767089844" xmlns:ns647="http://morphml.org/metadata/schema"/>
            <ns648:point x="279.9015197753906" y="-102.25822448730469" z="-159.3328857421875" xmlns:ns648="http://morphml.org/metadata/schema"/>
            <ns649:point x="279.9015197753906" y="-112.30184173583984" z="-150.06228637695312" xmlns:ns649="http://morphml.org/metadata/schema"/>
            <ns650:point x="279.9015197753906" y="-120.12451171875" z="-152.76609802246094" xmlns:ns650="http://morphml.org/metadata/schema"/>
            <ns651:point x="279.9015197753906" y="-121.57313537597656" z="-164.45175170898438" xmlns:ns651="http://morphml.org/metadata/schema"/>
        </curve>
        <curve id="3926" name="user-created curve">
            <ns652:point x="279.4509582519531" y="-122.12429809570312" z="-181.02926635742188" xmlns:ns652="http://morphml.org/metadata/schema"/>
            <ns653:point x="279.4509582519531" y="-119.7479019165039" z="-193.21719360351562" xmlns:ns653="http://morphml.org/metadata/schema"/>
            <ns654:point x="279.4509582519531" y="-121.35775756835938" z="-210.08116149902344" xmlns:ns654="http://morphml.org/metadata/schema"/>
            <ns655:point x="279.4509582519531" y="-114.99539184570312" z="-199.80958557128906" xmlns:ns655="http://morphml.org/metadata/schema"/>
            <ns656:point x="279.45184326171875" y="-111.00947570800781" z="-191.1481170654297" xmlns:ns656="http://morphml.org/metadata/schema"/>
            <ns657:point x="279.4509582519531" y="-113.30904388427734" z="-175.8937530517578" xmlns:ns657="http://morphml.org/metadata/schema"/>
        </curve>
    </curves>
    <slides>
        <slide>
            <name>hippo3b</name>
            <position x="285.75311279296875" y="-114.51262664794922" z="-180.00192260742188"/>
            <rotation w="-0.737393856048584" x="0.0" y="0.6754632592201233" z="0.0"/>
            <scale x="0.8000002503395081" y="0.8000002503395081" z="0.8000002503395081"/>
            <id>0</id>
            <imageURL>/etc/img/hippo_slice3b.jpg</imageURL>
            <ratio>1.309999942779541</ratio>
        </slide>
        <slide>
            <name>hippo3a</name>
            <position x="284.44635009765625" y="-120.85203552246094" z="-205.34542846679688"/>
            <rotation w="-0.7702319025993347" x="0.0" y="0.6377649307250977" z="0.0"/>
            <scale x="1.0" y="1.0" z="1.0"/>
            <id>0</id>
            <imageURL>/etc/img/hippo_slice3a.jpg</imageURL>
            <ratio>1.3300000429153442</ratio>
        </slide>
        <slide>
            <name>striatum 1</name>
            <position x="175.52601623535156" y="-160.91917419433594" z="-143.9582977294922"/>
            <rotation w="0.7071067690849304" x="0.0" y="-0.7071067690849304" z="0.0"/>
            <scale x="9.960002899169922" y="9.960002899169922" z="9.960002899169922"/>
            <id>0</id>
            <imageURL>/etc/img/striatum1.jpg</imageURL>
            <ratio>1.3300000429153442</ratio>
        </slide>
        <slide>
            <name>cerebImage</name>
            <position x="468.40594482421875" y="-117.42851257324219" z="-249.7540740966797"/>
            <rotation w="0.9848077893257141" x="-0.0" y="-0.0" z="-0.1736481785774231"/>
            <scale x="3.71000075340271" y="3.71000075340271" z="3.71000075340271"/>
            <id>0</id>
            <imageURL>http://ccdb.ucsd.edu/sand/main?event=rd&amp;type=512v&amp;mpid=53</imageURL>
            <ratio>1.1100000143051147</ratio>
        </slide>
        <slide>
            <name>user-created slide</name>
            <position x="279.6640930175781" y="-120.27185821533203" z="-189.35548400878906"/>
            <rotation w="-0.037399064749479294" x="-0.8136647939682007" y="-0.057278722524642944" z="-0.5772963762283325"/>
            <scale x="0.010001244023442268" y="0.010001244023442268" z="0.010001244023442268"/>
            <id>-1365852632383276695</id>
            <imageURL>http://i68.photobucket.com/albums/i35/prozacdj/synapse.jpg</imageURL>
            <ratio>1.0</ratio>
        </slide>
        <slide>
            <name>hippo3c</name>
            <position x="282.76751708984375" y="-116.20657348632812" z="-165.6507568359375"/>
            <rotation w="0.7316893935203552" x="0.0" y="-0.6816388368606567" z="0.0"/>
            <scale x="0.699999988079071" y="0.699999988079071" z="0.699999988079071"/>
            <id>0</id>
            <imageURL>/etc/img/hippo_slice3c.jpg</imageURL>
            <ratio>1.3300000429153442</ratio>
        </slide>
        <slide>
            <name>user-created slide</name>
            <position x="210.6978759765625" y="-136.11785888671875" z="-252.96151733398438"/>
            <rotation w="0.708254873752594" x="-0.017793826758861542" y="0.70566326379776" z="-0.009884555824100971"/>
            <scale x="31.160062789916992" y="31.160062789916992" z="31.160062789916992"/>
            <id>-1365852632383276695</id>
            <imageURL>http://bayimg.com/image/dalonaabk.jpg</imageURL>
            <ratio>1.0</ratio>
        </slide>
        <slide>
            <name>hippocampus 2</name>
            <position x="332.5680236816406" y="-160.00669860839844" z="-139.4047393798828"/>
            <rotation w="0.7071067690849304" x="0.0" y="-0.7071067690849304" z="0.0"/>
            <scale x="11.280001640319824" y="11.280001640319824" z="11.280001640319824"/>
            <id>0</id>
            <imageURL>/etc/img/hippo2.jpg</imageURL>
            <ratio>0.8700000047683716</ratio>
        </slide>
        <slide>
            <name>user-created slide</name>
            <position x="308.529296875" y="-140.27415466308594" z="-304.481201171875"/>
            <rotation w="1.0" x="0.0" y="0.0" z="0.0"/>
            <scale x="26.040040969848633" y="26.040040969848633" z="26.040040969848633"/>
            <id>-1365852632383276695</id>
            <imageURL>http://bayimg.com/image/dalokaabk.jpg</imageURL>
            <ratio>1.0</ratio>
        </slide>
        <slide>
            <name>CCDBSlide 35</name>
            <position x="302.6435241699219" y="-88.68245697021484" z="-167.6702117919922"/>
            <rotation w="-0.7373945713043213" x="0.0" y="0.6754647493362427" z="0.0"/>
            <scale x="11.959997177124023" y="11.959997177124023" z="11.959997177124023"/>
            <id>0</id>
            <imageURL>http://ccdb.ucsd.edu/sand/main?event=rd&amp;type=512v&amp;mpid=35</imageURL>
            <ratio>0.8700000047683716</ratio>
        </slide>
        <slide>
            <name>Waldo</name>
            <position x="284.9044189453125" y="-113.8294677734375" z="-186.30226135253906"/>
            <rotation w="-0.7259314060211182" x="0.0" y="0.6877681612968445" z="0.0"/>
            <scale x="3.8399972915649414" y="3.8399972915649414" z="3.8399972915649414"/>
            <id>0</id>
            <imageURL>/etc/img/hippo_slice2.jpg</imageURL>
            <ratio>1.340000033378601</ratio>
        </slide>
    </slides>
</neuroml>
